// COMSOL Multiphysics 6.1.0.282 model "4MF1.mph"
// Outline of the model tree

Parameters
  rcore = 4.98[um]
  rclad = 62.5[um]
  ncore = 1.4582
  nclad = 1.444
  lmd = 1.55[um]

Geometry
  geom1 "Geometry 1" (2D, length unit µm)
    c1: Circle | r = rclad
    c2: Circle | r = rcore
    fin: Finalize "Form Union"

Materials
  mat1: Common "core" on domains 2
    RefractiveIndex
      n = ncore
      ki = 0
  mat2: Common "clad" on domains 1
    RefractiveIndex
      n = nclad
      ki = 0

Physics
  ewfd: ElectromagneticWavesFrequencyDomain on all domains
    dependent variable E = {Ex, Ey, Ez}
    wee1: WaveEquationElectric (default)
    pec1: PerfectElectricConductor (default)
    init1: init "Initial Values 1" (default)

Mesh
  mesh1 "Mesh 1" (physics-controlled)
    size: MeshSizeDefault | hauto = 7

Studies
  std1 "Study 1"
    mode: ModeAnalysis | modeFreq = c_const/lmd; neigs = 20; shift = 1.45; eigsymchk = on; conrad = 1; linpsolnum = auto

Solver configurations
  sol1 "Solution 1" (study std1)
    v1: Variables "Dependent Variables 1"
    e1: Eigenvalue "Eigenvalue Solver 1" | neigs = 20; shift = 1.45
      d1: Direct "Suggested Direct Solver (ewfd)"

Datasets
  dset1: Solution | solution = sol1
  cln1: CutLine2D | data = dset1; genpoints = {{0, 0}, {62.5, 0}}

Plots
  pg1: PlotGroup2D "Electric Field (ewfd)" | data = dset1
    surf1: Surface | expr = ewfd.normE
  pg2: PlotGroup1D "1D Plot Group 2" | data = dset1
    lngr1: LineGraph | data = cln1; expr = ewfd.nxx; xdata = expr; xdataexpr = x